<?xml version="1.0" ?>
<fdm_config xmlns:xsi="http://www.w3.org/2001/XMLSchema-instance" name="PQ_ROCKET" version="2.0" xsi:noNamespaceSchemaLocation="http://jsbsim.sourceforge.net/JSBSim.xsd" release="ALPHA">

    <fileheader>
        <author> PLANET-Q </author>
        <author> K.Gentaro </author>
        <filecreationdate> 2025-05-02 </filecreationdate>
        <version>$Revision: 1.00 $</version>
        <description> Models a hybrid rocket. </description>
        <note>
           Automatically generated file. Hybrid rocket model.
           This is a simple model of a hybrid rocket.
        </note>
    </fileheader>

    <metrics>
        <wingarea  unit="M2">   0.015 </wingarea>
        <wingspan  unit="M" >   0.12 </wingspan>
        <wing_incidence>         0.0 </wing_incidence>
        <chord     unit="M" >   0.12 </chord>
        <htailarea unit="M2">   0 </htailarea>
        <htailarm  unit="M" >   0 </htailarm>
        <vtailarea unit="M2">   0 </vtailarea>
        <vtailarm  unit="M" >   0 </vtailarm>
        <location name="AERORP" unit="M">
            <x> 1.5 </x>
            <y> 0.0 </y>
            <z> 0.0 </z>
        </location>
        <location name="EYEPOINT" unit="M">
            <x> 0.0 </x>
            <y> 0.0 </y>
            <z> 0.0 </z>
        </location>
        <location name="VRP" unit="M">
            <x> 0.0 </x>
            <y> 0.0 </y>
            <z> 0.0 </z>
        </location>
    </metrics>


     <mass_balance>
        <documentation>
            The Center of Gravity location, empty weight, in aircraft's own
            structural coord system.
        </documentation>
        <ixx unit="KG*M2"> 0.04 </ixx>
        <iyy unit="KG*M2"> 3.4 </iyy>
        <izz unit="KG*M2"> 3.4 </izz>
        <ixy unit="KG*M2"> -2.769e-05 </ixy>
        <ixz unit="KG*M2"> 0.0 </ixz>
        <iyz unit="KG*M2"> -2.921e-08 </iyz>
        <emptywt unit="KG"> 12.454 </emptywt>
        <location name="CG" unit="M">
            <x> 1.17 </x>
            <y> -2.872e-06 </y>
            <z> -5.495e-05 </z>
        </location>
    </mass_balance>

    <ground_reactions>
        <contact type="STRUCTURE" name="Default">
          <location unit="IN">
           <x> 0.0 </x>
           <y> 0.0 </y>
           <z> 0.0 </z>
          </location>
          <static_friction>  1.00 </static_friction>
          <dynamic_friction> 1.00 </dynamic_friction>
          <spring_coeff unit="LBS/FT">      10.00 </spring_coeff>
          <damping_coeff unit="LBS/FT/SEC"> 10.00 </damping_coeff>
        </contact>
    </ground_reactions>


    <propulsion>
        <tank type="FUEL" number="0">
            <location unit="M">
                <x> 0.63 </x>
                <y> 0.0 </y>
                <z> 0.0 </z>
            </location>
            <drain_location unit="M">
                <x> 1.1 </x>
                <y> 0.0 </y>
                <z> 0.0 </z>
            </drain_location>
            <radius unit="M"> 0.07 </radius>
            <capacity unit="KG"> 3.528 </capacity>
            <contents unit="KG"> 3.528 </contents>
            <density unit="KG/L"> 1.226 </density>
        </tank>
        <tank type="FUEL" number="1">
            <location unit="M">
                <x> 1.44 </x>
                <y> 0.0 </y>
                <z> 0.0 </z>
            </location>
            <drain_location unit="M">
                <x> 1.78 </x>
                <y> 0.0 </y>
                <z> 0.0 </z>
            </drain_location>
            <radius unit="M"> 0.04 </radius>
            <capacity unit="KG"> 2.876 </capacity>
            <contents unit="KG"> 2.876 </contents>
            <density unit="KG/L"> 1.0 </density>
            <grain_config type="CYLINDRICAL">
                <length unit="M"> 0.34 </length>
            </grain_config>
        </tank>
    </propulsion>

    <flight_control name="PQ_ROCKET_CONTROL">
        <channel name="chute">
            <fcs_function name="fcs/parachute_reef_pos_norm">
                <function>
                    <product>
                        <value> 0.3333333322222222 </value>
                        <difference>
                            <property>simulation/sim-time-sec</property>
                            <property>simulation/parachute_deploy_time</property>
                        </difference>
                    </product>

                </function>
                <clipto>
                    <min>0.</min>
                    <max>1.</max>
                </clipto>
            </fcs_function>
            <pure_gain name="metrics/Schute-sqft">
                <input>fcs/parachute_reef_pos_norm</input>
                <gain> 4.595999973059648 </gain> <!-- Area of braking chute -->
            </pure_gain>
        </channel>

        <channel name="fuel_remaining">
            <fcs_function name="fcs/fuel_remaining">
                <function>
                    <table>
                        <independentVar>simulation/sim-time-sec</independentVar>
                        <tableData>
                            0.0 1.0
                            0.01 0.9999993029706491
                            0.52 0.9391820639523003
                            1.03 0.8591581696541635
                            1.54 0.7820973485845486
                            2.05 0.7068069834455686
                            2.56 0.6317264244997587
                            3.07 0.5578830931258077
                            3.58 0.48595310841148365
                            4.09 0.4156402331257708
                            4.6 0.34736198717986444
                            5.11 0.2812556857155569
                            5.62 0.21733178433109424
                            6.13 0.15568926161671093
                            6.64 0.0965002833716766
                            7.15 0.062294245503723755
                            7.66 0.04307574134680814
                            8.17 0.029485752349375338
                            8.68 0.019757308175717525
                            9.19 0.01291526418909017
                            9.7 0.008443818337031117
                            10.21 0.005107136949521696
                            10.72 0.0026933229369333622
                            11.23 0.0010169663921977268
                            11.6 -1.3322676295501878e-15
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
                        </tableData>
                    </table>
                </function>
                <clipto>
                    <min>0.</min>
                    <max>1.</max>
                </clipto>
            </fcs_function>
            <pure_gain name="propulsion/tank[0]/contents-lbs">
                <input>fcs/fuel_remaining</input>
                <gain> 7.777899359999999 </gain>
            </pure_gain>
            <pure_gain name="propulsion/tank[1]/contents-lbs">
                <input>fcs/fuel_remaining</input>
                <gain> 1.4550491999999993 </gain>
            </pure_gain>
        </channel>

        <channel name="thrust">
            <fcs_function name="fcs/thrust">
                <function>
                    <table>
                        <independentVar>simulation/sim-time-sec</independentVar>
                        <tableData>
                            0.01 0.1398556667829979
                            0.02 3.0768264676974986
                            0.53 321.24865903700146
                            1.04 307.26308404077076
                            1.55 297.47316510987554
                            2.06 292.8579404705285
                            2.57 288.8021041025452
                            3.08 281.80931649202535
                            3.59 280.69048577034266
                            4.1 273.41797693466333
                            4.61 261.2505222344775
                            5.12 255.37659277233143
                            5.63 247.82438991337472
                            6.14 236.63591881082837
                            6.65 219.57351824613596
                            7.16 88.52868877969458
                            7.67 62.515519695857776
                            8.18 45.87268410823388
                            8.69 31.887108887194252
                            9.2 19.16023714009998
                            9.71 14.125430663013683
                            10.22 12.027594087606111
                            10.73 7.692066169243746
                            11.24 7.132643052493869
                            11.6 0.0
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
                        </tableData>
                    </table>
                </function>
                <clipto>
                    <min>0.</min>
                    <max>100000000.</max>
                </clipto>
                <output>external_reactions/thrust/magnitude</output>
            </fcs_function>
        </channel>
    </flight_control>

    <external_reactions>
        <property>fcs/parachute_reef_pos_norm</property>
        <force name="parachute" frame="WIND">
            <function>
                <product>
                    <property> aero/qbar-psf </property>
                    <property> metrics/Schute-sqft </property>
                    <value> 1.2 </value>
                </product>
            </function>

            <location unit="M">
                <x>0</x>
                <y>0</y>
                <z>0</z>
            </location>
            <direction>
                <x>-1</x>
                <y>0</y>
                <z>0</z>
            </direction>
        </force>

        <force name="thrust" frame="BODY">
            <location unit="M">
                <x> 1.85 </x>
                <y> 0.0 </y>
                <z> 0.0 </z>
            </location>
            <direction>
                <x>1</x>
                <y>0</y>
                <z>0</z>
            </direction>
        </force>
    </external_reactions>

    <aerodynamics>
        <axis name="DRAG">
            <function name="aero/coefficient/CD0">
                <description>Drag_at_zero_lift</description>
                <product>
                    <property>aero/qbar-psf</property>
                    <property>metrics/Sw-sqft</property>
                    <table>
                        <independentVar>aero/alpha-rad</independentVar>
                        <tableData>
                            -0.027415579534029105 30.488
                            -0.0243694040341266 29.58338931
                            -0.021323228516770803 26.97866665
                            -0.0182770530168683 22.988
                            -0.015230877516965802 18.09272267
                            -0.0121847020170633 12.88327733
                            -0.009138526517160801 7.988
                            -0.006092350999805001 3.997333353
                            -0.0030461754999025004 1.392610688
                            0.0 0.49
                            0.0030461754999025004 1.392610688
                            0.006092350999805001 3.997333353
                            0.009138526517160801 7.988
                            0.0121847020170633 12.88327733
                            0.015230877516965802 18.09272267
                            0.0182770530168683 22.988
                            0.021323228516770803 26.97866665
                            0.0243694040341266 29.58338931
                            0.027415579534029105 30.488

                        </tableData>
                    </table>
                </product>
            </function>

            <function name="aero/coefficient/CDmach">
                <description>Drag_due_to_Mach_number</description>
                <product>
                    <property>aero/qbar-psf</property>
                    <property>metrics/Sw-sqft</property>
                    <table>
                        <independentVar>velocities/mach</independentVar>
                        <tableData>
                            0.0 0.595
                            0.05 -0.013
                            0.1 -0.012
                            0.2 -0.008
                            0.3 0.0
                            0.4 0.011
                            0.5 0.025
                            0.6 0.043
                            0.7 0.063
                            0.8 0.087
                            0.9 0.112
                            1.0 0.144

                        </tableData>
                    </table>
                </product>
            </function>
        </axis>

        <axis name="SIDE">
            <function name="aero/coefficient/CYb">
                <description>Side_force_due_to_beta</description>
                <product>
                    <property>aero/qbar-psf</property>
                    <property>metrics/Sw-sqft</property>
                    <property>aero/beta-rad</property>
                    <value> -1</value>
                </product>
            </function>
        </axis>

        <axis name="LIFT">
            <function name="aero/coefficient/CLalpha">
                <description>Lift_due_to_alpha</description>
                <product>
                    <property>aero/qbar-psf</property>
                    <property>metrics/Sw-sqft</property>
                    <property>aero/alpha-rad</property>
                    <value> 8.471 </value>
                </product>
            </function>
        </axis>

        <axis name="ROLL">
            <function name="aero/coefficient/Clb">
                <description>Roll_moment_due_to_beta</description>
                <product>
                    <property>aero/qbar-psf</property>
                    <property>metrics/Sw-sqft</property>
                    <property>metrics/bw-ft</property>
                    <property>aero/beta-rad</property>
                    <value> 0.0 </value>
                </product>
            </function>
            <function name="aero/coefficient/Clp">
                <description>Roll_moment_due_to_roll_rate_(roll_damping)</description>
                <product>
                    <property>aero/qbar-psf</property>
                    <property>metrics/Sw-sqft</property>
                    <property>metrics/bw-ft</property>
                    <property>aero/bi2vel</property>
                    <property>velocities/p-rad_sec</property>
                    <value> -0.0423 </value>
                </product>
            </function>
            <function name="aero/coefficient/Clr">
                <description>Roll_moment_due_to_yaw_rate</description>
                <product>
                    <property>aero/qbar-psf</property>
                    <property>metrics/Sw-sqft</property>
                    <property>metrics/bw-ft</property>
                    <property>aero/bi2vel</property>
                    <property>velocities/r-rad_sec</property>
                    <value> 0.0 </value>
                </product>
            </function>
        </axis>
        <axis name="PITCH">
            <function name="aero/coefficient/Cmalpha">
                <description>Pitch_moment_due_to_alpha</description>
                <product>
                    <property>aero/qbar-psf</property>
                    <property>metrics/Sw-sqft</property>
                    <property>metrics/cbarw-ft</property>
                    <property>aero/alpha-rad</property>
                    <value> 0.0 </value>
                </product>
            </function>
            <function name="aero/coefficient/Cmq">
                <description>Pitch_moment_due_to_pitch_rate</description>
                <product>
                    <property>aero/qbar-psf</property>
                    <property>metrics/Sw-sqft</property>
                    <property>metrics/cbarw-ft</property>
                    <property>aero/ci2vel</property>
                    <property>velocities/q-aero-rad_sec</property>
                    <value> -2.488 </value>
                </product>
            </function>
        </axis>
        <axis name="YAW">
            <function name="aero/coefficient/Cnb">
                <description>Yaw_moment_due_to_beta</description>
                <product>
                    <property>aero/qbar-psf</property>
                    <property>metrics/Sw-sqft</property>
                    <property>metrics/bw-ft</property>
                    <property>aero/beta-rad</property>
                    <value> 0.0 </value>
                </product>
            </function>
            <function name="aero/coefficient/Cnr">
                <description>Yaw_moment_due_to_yaw_rate</description>
                <product>
                    <property>aero/qbar-psf</property>
                    <property>metrics/Sw-sqft</property>
                    <property>metrics/bw-ft</property>
                    <property>aero/bi2vel</property>
                    <property>velocities/r-aero-rad_sec</property>
                    <value> -2.488 </value>
                </product>
            </function>
        </axis>
    </aerodynamics>

</fdm_config>
