<?xml version="1.0"?>
<rocket_engine name="PQ_ENGINE">
  <isp> 221.1158078  </isp>
  <builduptime> 0.0 </builduptime>
  <slfuelflowmax unit="KG/SEC"> 0.008985453  </slfuelflowmax>
  <sloxiflowmax unit="KG/SEC"> 0.554239073  </sloxiflowmax>
  <thrust_table name="propulsion/thrust_prop_remain" type="internal">
    <tableData>
      0	114.616883
      0.1	266.6610966
      0.5	319.627134
      0.9	313.7161372
      1.3	308.0769588
      1.7	301.2058116
      2.1	297.4713077
      2.5	295.8270338
      2.9	295.2037784
      3.3	293.3455883
      3.7	290.4877472
      4.1	285.8542491
      4.5	280.2638339
      4.9	276.8094862
      5.3	271.8761175
      5.7	266.8262284
      6.1	261.1323244
      6.5	254.7898418
      6.9	249.1742265
      7.3	243.4427478
      7.7	236.908115
      8.1	229.5696033
      8.5	84.07882851
      8.9	22.73490408
      9	9.115894277
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    </tableData>
  </thrust_table>
</rocket_engine>
