<?xml version="1.0"?>
<?xml-stylesheet type="text/xsl" href="http://jsbsim.sourceforge.net/JSBSim.xsl"?>
<fdm_config name="737" release="BETA" version="2.0"
    xmlns:xsi="http://www.w3.org/2001/XMLSchema-instance"
    xsi:noNamespaceSchemaLocation="http://jsbsim.sourceforge.net/JSBSim.xsd">

    <fileheader>
        <author> PLANET-Q </author>
        <author> K.Gentaro </author>
        <filecreationdate> 2025-05-02 </filecreationdate>
        <version>$Revision: 1.00 $</version>
        <description> Models a hybrid rocket. </description>
        <note>
           Automatically generated file. Hybrid rocket model.
           This is a simple model of a hybrid rocket.
        </note>
    </fileheader>

    <metrics>
        <wingarea  unit="M2">   0 </wingarea>
        <wingspan  unit="M" >   0 </wingspan>
        <wing_incidence>         0.0 </wing_incidence>
        <chord     unit="M" >   1.89 </chord>
        <htailarea unit="M2">   0 </htailarea>
        <htailarm  unit="M" >   0 </htailarm>
        <vtailarea unit="M2">   0 </vtailarea>
        <vtailarm  unit="M" >   0 </vtailarm>
        <location name="AERORP" unit="M">
            <x> 0.0 </x>
            <y> 0.0 </y>
            <z> 0.0 </z>
        </location>
        <location name="EYEPOINT" unit="M">
            <x> 0.0 </x>
            <y> 0.0 </y>
            <z> 0.0 </z>
        </location>
        <location name="VRP" unit="M">
            <x> 0.0 </x>
            <y> 0.0 </y>
            <z> 0.0 </z>
        </location>
    </metrics>


     <mass_balance>
        <documentation>
            The Center of Gravity location, empty weight, in aircraft's own
            structural coord system.
        </documentation>
        <ixx unit="KG*M2"> 0.05411 </ixx>
        <iyy unit="KG*M2"> 7.048 </iyy>
        <izz unit="KG*M2"> 7.048 </izz>
        <ixy unit="KG*M2">         0 </ixy>
        <ixz unit="KG*M2">         0 </ixz>
        <iyz unit="KG*M2">         0 </iyz>
        <emptywt unit="KG"> 1.404 </emptywt>
        <location name="CG" unit="M">
            <x> 0.833 </x>
            <y> 0 </y>
            <z> 0 </z>
        </location>
    </mass_balance>

    <external_reactions>
        <property>fcs/parachute_reef_pos_norm</property>
        <force name="parachute" frame="WIND">
            <function>
                <product>
                    <p> aero/qbar-psf </p>
                    <p> fcs/parachute_reef_pos_norm </p>
                    <v> 1.0 </v> <!-- Full drag coefficient -->
                    <v> 20.0 </v> <!-- Full parachute area -->
                </product>
            </function>
        <!-- The location below is in structural frame (x positive
        aft), so this location describes a point 1 foot aft
        of the origin. In this case, the origin is the center. -->
            <location unit="FT">
                <x>1</x>
                <y>0</y>
                <z>0</z>
            </location>
        <!-- The direction describes a unit vector. In this case, since
        the selected frame is the WIND frame, the "-1" x component
        describes a direction exactly opposite of the direction
        into the wind vector. That is, the direction specified below
        is the direction that the drag force acts in. -->
            <direction>
                <x>-1</x>
                <y>0</y>
                <z>0</z>
            </direction>
        </force>
    </external_reactions>

    <aerodynamics>
        <axis name="DRAG">
            <function name="aero/coefficient/CD0">
                <description>Drag_at_zero_lift</description>
                <product>
                    <property>aero/qbar-pa</property>
                    <property>metrics/Sw-m2</property>
                    <value>0.6</value>
                </product>
            </function>


            <function name="aero/coefficient/CDmach">
                <description>Drag_due_to_mach</description>
                <product>
                    <property>aero/qbar-pa</property>
                    <property>metrics/Sw-m2</property>
                      <table>
                          <independentVar>velocities/mach</independentVar>
                          <tableData>
                            0.0 0.4835240824127409
                            0.3 0.4835240824127409
                            0.5 0.48471525909530644
                            0.7 0.49494850828909404
                            0.8 0.5060252267102546
                            0.85 0.5143309626567436
                            0.9 0.5254755999043734
                          </tableData>
                      </table>
                </product>
            </function>
        </axis>

        <axis name="SIDE">
            <function name="aero/coefficient/CYb">
                <description>Side_force_due_to_beta</description>
                <product>
                    <property>aero/qbar-pa</property>
                    <property>metrics/Sw-m2</property>
                    <property>aero/beta-rad</property>
                    <value>12.0</value>
                </product>
            </function>
        </axis>

        <axis name="LIFT">
            <function name="aero/coefficient/CLalpha">
                <description>Lift_due_to_alpha</description>
                <product>
                    <property>aero/qbar-pa</property>
                    <property>metrics/Sw-m2</property>
                    <property>aero/alpha-rad</property>
                    <value>12.0</value>
                </product>
            </function>
        </axis>

        <axis name="ROLL">
            <function name="aero/coefficient/Clb">
                <description>Roll_moment_due_to_beta</description>
                <product>
                    <property>aero/qbar-pa</property>
                    <property>metrics/Sw-m2</property>
                    <property>metrics/bw-m</property>
                    <property>aero/beta-rad</property>
                    <value>0.00</value>
                </product>
            </function>
            <function name="aero/coefficient/Clp">
                <description>Roll_moment_due_to_roll_rate_(roll_damping)</description>
                <product>
                    <property>aero/qbar-pa</property>
                    <property>metrics/Sw-m2</property>
                    <property>metrics/bw-m</property>
                    <property>aero/bi2vel</property>
                    <property>velocities/p-rad_sec</property>
                    <value>0.0</value>
                </product>
            </function>
            <function name="aero/coefficient/Clr">
                <description>Roll_moment_due_to_yaw_rate</description>
                <product>
                    <property>aero/qbar-pa</property>
                    <property>metrics/Sw-m2</property>
                    <property>metrics/bw-m</property>
                    <property>aero/bi2vel</property>
                    <property>velocities/r-rad_sec</property>
                    <value>0.0000</value>
                </product>
            </function>
        </axis>
        <axis name="PITCH">
            <function name="aero/coefficient/Cmalpha">
                <description>Pitch_moment_due_to_alpha</description>
                <product>
                    <property>aero/qbar-pa</property>
                    <property>metrics/Sw-m2</property>
                    <property>metrics/cbarw-m</property>
                    <property>aero/alpha-rad</property>
                    <value>0.0</value>
                </product>
            </function>
            <function name="aero/coefficient/Cmq">
                <description>Pitch_moment_due_to_pitch_rate</description>
                <product>
                    <property>aero/qbar-pa</property>
                    <property>metrics/Sw-m2</property>
                    <property>metrics/cbarw-m</property>
                    <property>aero/ci2vel</property>
                    <property>velocities/q-aero-rad_sec</property>
                    <value>-4.0</value>
                </product>
            </function>
        </axis>
        <axis name="YAW">
            <function name="aero/coefficient/Cnb">
                <description>Yaw_moment_due_to_beta</description>
                <product>
                    <property>aero/qbar-pa</property>
                    <property>metrics/Sw-m2</property>
                    <property>metrics/bw-m</property>
                    <property>aero/beta-rad</property>
                    <value>0.0</value>
                </product>
            </function>
            <function name="aero/coefficient/Cnr">
                <description>Yaw_moment_due_to_yaw_rate</description>
                <product>
                    <property>aero/qbar-pa</property>
                    <property>metrics/Sw-m2</property>
                    <property>metrics/bw-m</property>
                    <property>aero/bi2vel</property>
                    <property>velocities/r-aero-rad_sec</property>
                    <value>-4.0</value>
                </product>
            </function>
        </axis>
    </aerodynamics>

</fdm_config>
